# Расчёт РН "Нормаль" | Составитель: Кочетов Артём
m_сух := 3  # кг  # Сухая масса ракеты.
m_топ := 1  # кг  # Масса топлива.
ν_0 := 4  # Стартовая ТВР.
V_напр := 15  # м/c  # Скорость схода с направляющей.
I_sp := 300  # м/c  # Средний УИ.
g := 9.81  # м/c^2  # Ускорение свободного падения.
m_0 := m_сух + m_топ = 4  # кг  # Стартовая масса ракеты.
P_0 := m_0*g*ν_0 = 156.96  # Н  # Тяга ДУ.
M_расх_0 := P_0/I_sp = 0.5232  # кг/c  # Массовый расход.
t_раб := m_топ/M_расх_0 = 1.91131  # c  # Время работы.
c_x := 0.25  # Коэф. аэрод. сопр. (От Володи)
d_рак := 70*10^-3  # м  # Диаметр ракеты.
ρ_возд := 1.23  # кг/м^3  # Плотность возд при НУ.
S_м := π*d_рак^2/4 = 0.00384845  # м^2  # Площадь миделя
F_аэрод(V) := c_x*S_м*ρ_возд*V^2/2
m(t) := m_0 - M_расх_0*t
t := 0, 0.01 .. t_раб
solve block
    # constraints
    h(0) == 0
    h'(0) == 0
    m(t)*d^2/dt^2(h(t)) == P_0 - m(t)*g - F_аэрод(d/dt(h(t)))
    # solver
    h := odesolve(h(t), t_раб + 0.01)
end solve block
# [plot: h(t) vs t]
# [plot: h'(t) vs t]
h(t_раб) = 60.4017  # м  # Высота в конце АУТ
h'(t_раб) = 67.0736  # м/c  # Скорость в конце АУТ
solve block
    # guess values
    t := 1
    # constraints
    h'(t) == V_напр
    # solver
    t_напр := find(t)
end solve block
t_напр = 0.488164  # c  # Время до конца направляющей
h_напр := h(t_напр) = 3.6088  # м  # Высота направляющей
solve block
    # constraints
    h_пас(0) == h(t_раб)
    h_пас'(0) == h'(t_раб)
    m_сух*d^2/dt^2(h_пас(t)) == -m_сух*g - F_аэрод(d/dt(h_пас(t)))
    # solver
    h_пас := odesolve(h_пас(t), 7)
end solve block
solve block
    # guess values
    t := 5
    # constraints
    h_пас'(t) == 0
    # solver
    t_апогей := find(t) = 6.64163
end solve block
h_пас(t_апогей) = 279.917  # м  # Высота в конце АУТ
ρ_перекиси := 1242  # кг/м^3  # Плотность перекиси 60%
V_топ := m_топ/ρ_перекиси = 0.000805153  # м^3  # Объём перекиси
V_бака := 2*V_топ = 0.00161031  # м^3  # Объём бака
h_бака := 4*V_бака/(π*d_рак^2) = 0.41843  # м  # Высота бака
p_бака_0 := 30  # Атм  # Стартовое давление подачи
p_кс := 8  # Атм  # Давление в камере
κ := (p_бака_0 - p_кс)/M_расх_0^2 = 80.3687  # Коэф. гидравл. сопротивления
p_бака(m) := p_бака_0*(V_бака - V_топ)/(V_бака - V_топ + m/ρ_перекиси)
M_расх(m) := sqrt((p_бака(m) - p_кс)/κ)
# Перейдём к зависимости по времени
Δm := 0.01
F :=
    t[0] ← 0
    for i ∈ 0, 1 .. m_топ/Δm
        m ← i*Δm
        M_расх_ср ← 1/2*(M_расх(m) + M_расх(m - Δm))
        Δt ← Δm/M_расх_ср
        t[i + 1] ← t[i] + Δt
        F[0, i] ← M_расх(m)
        F[1, i] ← m
        F[2, i] ← t[i]
    return F
M_расх_действ(t) :=
    if t < 0 or t > 5
        f ← NaN
    else
        f ← linterp(transpose(F)[:, 2], transpose(F)[:, 0], t)
m_действ(t) :=
    if t < 0 or t > 5
        f ← NaN
    else
        f ← linterp(transpose(F)[:, 2], transpose(F)[:, 1], t)
i_оконч := floor(m_топ/Δm) = 100
t_р_дейст := F[2, i_оконч] = 2.59354
t_a := 0, 0.01 .. t_р_дейст
# [plot: M_расх_действ(t_a) vs t_a]
# [plot: m_действ(t_a) vs t_a]
m(t) := m_0 - m_действ(t)
P(t) := I_sp*M_расх_действ(t)
t := 0, 0.01 .. 5
solve block
    # constraints
    h(0) == 0
    h'(0) == 0
    m(t)*d^2/dt^2(h(t)) == P(t) - m(t)*g - F_аэрод(d/dt(h(t)))
    # solver
    h := odesolve(h(t), t_раб + 0.01)
end solve block
# [plot: h(t) vs t]
# [plot: h'(t) vs t]
h(t_раб) = 46.7084  # м  # Высота в конце АУТ
h'(t_раб) = 46.2243  # м/c  # Скорость в конце АУТ
solve block
    # guess values
    t := 1
    # constraints
    h'(t) == V_напр
    # solver
    t_напр := find(t)
end solve block
t_напр = 0.547552  # c  # Время до конца направляющей
h_напр := h(t_напр) = 4.19957  # м  # Высота направляющей
solve block
    # constraints
    h_пас(0) == h(t_раб)
    h_пас'(0) == h'(t_раб)
    m_сух*d^2/dt^2(h_пас(t)) == -m_сух*g - F_аэрод(d/dt(h_пас(t)))
    # solver
    h_пас := odesolve(h_пас(t), 7)
end solve block
solve block
    # guess values
    t := 5
    # constraints
    h_пас'(t) == 0
    # solver
    t_апогей := find(t) = 4.64617
end solve block
h_пас(t_апогей) = 153.338  # м  # Высота в конце АУТ
