# Раздел 1
k_бака := 2
d_рак := 0.07 m
ρ_топ := 1242*kg/m^3
g = 9.80665 m/s^2
Тяга
v_0 := 4  # м/c
m_сух := 3.2 kg
m_топ := 1 kg
I_уд := 300.*m/s
P_0 := v_0*(m_сух + m_топ)*g
V := I_уд*ln((m_сух + m_топ)/m_сух) = 81.5801 m/s
P_0 = 164.752 N
Объем
V_топ := m_топ/ρ_топ = 0.805153 L
V_бака := V_топ*k_бака = 1.61031 L
h_бака := V_бака*4/(π*d_рак^2) = 0.41843 m
# 2 Раздел
V_бака := V_топ*k_бака = 1.61031 L  # макс ускорение
a_макс := P_0/m_сух = 51.4849 m/s^2
a_макс/g = 5.25
h_бака := V_бака*4/(π*d_рак^2) = 0.41843 m
a_мин := P_0/(m_сух + m_топ) = 39.2266 m/s^2
a_мин/g = 4
p_бака := 3000000 Pa
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p_кам := 800000 Pa
k_зап := 2
# Принцип расчета:
# На бак будет действовать внутреннее давление и сила от перегрузки
#
# Дан коэффициент запаса, предел текучести АМГ6 найдем из ГОСТ, отсюда сможем найти допускаемое напряжение σ.экв
#
# Исходя из расчетной схемы найдем опасную точку, проанализируем напряженное состояние в точке, найдем эквивалентное напряжение по критерию Треска-Сан-Венана(предполагаю что растяжение и сжатие эквивалентно у АМГ6). В итоге получим формулу σ.экв, в которой будет одна неизвестная δ. Приравняем формулу к значению, найденному ранее и найдем δ
# Максимальная нагрузка на бак от перезрузки, действующей на топливо будет тогда, когда будет достаточно велика перегрузка, и при этом в баке останется достаточно массы топлива.
F_топ := 20 N  # Условно такое значение, будет порядка нескольких десятков ньютонов, так как мин. ускорение 39.3 а макс. 51.4
# Чтобы рассчитать точно, нужно найти зависимость этой силы от ускорения и массы топлива
σ_m := (F_топ + π*p_бака*d_рак^2/4)/(π*d_рак*δ)  # error: This value must be a scalar.
σ_t := p_бака*d_рак/(2*δ)  # error: This value must be a scalar.
σ_1 := σ_t  # error: This variable is undefined.
σ_2 := σ_m  # error: This variable is undefined.
σ_3 := 0
# У АМГ6 большой разброс по пределу текучести, поэтому возьму средний 250
σ_т := 250000000 Pa
# По критерию Треска-Сан-Венана найдем эквивалетное напряжение
σ_экв := sqrt((σ_1 - σ_2)^2 + (σ_1 - σ_3)^2 + (σ_2 - σ_3)^2)/sqrt(2) = sqrt((σ_1 - σ_2)^2 + σ_1^2 + σ_2^2)/sqrt(2)  # error: This variable is undefined.
σ_экв := σ_т/k_зап
σ_экв = 125000000 Pa
((F_топ + π*p_бака*d_рак^2/4)*2 - p_бака*d_рак^2*π)^2/(2*π*d_рак*δ)^2 + ((F_топ + π*p_бака*d_рак^2/4)/(π*d_рак*δ))^2 + (p_бака*d_рак/(2*δ))^2
1/sqrt(2)
1/δ^2 = σ_экв*sqrt(2)/(((F_топ + π*p_бака*d_рак^2/4)*2 - p_бака*d_рак^2*π)^2/(2*π*d_рак)^2 + ((F_топ + π*p_бака*d_рак^2/4)/(π*d_рак))^2 + (p_бака*d_рак/2)^2)  # error: This value must be a scalar.
δ := sqrt((((F_топ + π*p_бака*d_рак^2/4)*2 - p_бака*d_рак^2*π)^2/(2*π*d_рак)^2 + ((F_топ + (π*p_бака)*d_рак^2/4)/(π*d_рак))^2 + (p_бака*d_рак/2)^2)/(σ_экв*sqrt(2)))
δ = 9.67214 kg^(1/2)*m^(1/2)/s
# Формулы вроде верные, но значение и размерность странные
# думаю должно быть около 1мм
δ := 1 mm
# Если известна толщина стенок, можно рассчитать массу бака
# Плотность АМГ6
ρ_мат := 2640*kg/m^3
m_бок := ρ_мат*π*d_рак*h_бака*δ
m_бок = 0.242926 kg
m_крыш := ρ_мат*π*d_рак^2*δ/4
m_крыш = 0.0101599 kg
M_бака := m_бок + 2*m_крыш
M_бака = 0.263246 kg
# Процесс изготовления:
#
# Можно попробовать сделать из листового металла, вырезать прямоугольник, 2 круга и сварить/спаять
#
# Также думаю можно попробовать сделать из листа путем выпрессовки, тогда формы получатся более гладкие
# Раздел 3
# В топливном баке не стоит делать лишних сквозных отверстий, поэтому надо закрепить его иначе.
#
# Как вариант, можно сделать некоторого вида кожух, куда жестко вставляется бак и держится внутри.
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# Раздел 4
# Сущетсвует множество видов контроллеров, подходящих для разных целей работы. Для примера возьму Arduino, хотя в реальных условиях стоит взять что-то эффективнее
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# Алгоритм работы системы:
#
# 1) По сигналу с наземной станции отдается сигнал через передатчик(например nrf24L01) на контроллер в ракете, он в свою очередь отдает сигнал на реле, которое замыкает цепь между насосом, зажиганием и питанием, ракета взлетает
#
# 2) Для опр. высоты и скорости используется датчик давления. Каждые 0.1 секунды будет отправлять данные на наземную станцию, мы получаем данные высоты, выводится на экран. Скорость вычисляется через производную высоты, выводится на экран.
#
# 3) С течением времени скорость станет отрицательной, это значит, что высота стала уменьшаться, следовательно был достигнут апогей. Момент времени перехода скорости в минус будет считаться апогеем, выводится на экран. В тот же момент раскрывается парашют по сигналу от бортового контроллера.
#
# 4) Координаты точки падения можно найти через датчик GPS на бортовой системе. Он будет переодически в течении полета присылать координаты, а когда они остановятся на конкретных значениях - можно идти искать
# Уязвимости :
# Датчик давления может передавать некорректные значения, изза этого могут быть проблемы с определением высоты и скорости. В качестве замены можно использовать сами датчики. Написать программу, суть которой будет запросить ответ у бортовой системы, получить его и измерить время ответа. Так можно будет во первых, найти расстояние между датчиками, и во вторых это будет некоторый мониторинг состояния бортового контроллера, если отвечать не будет, значит что-то не так.
