# Параметры пружины | Параметры штока
z := 22.9 N/mm
D := 19 mm
d := 6 mm
# Поджим
(999 kg/m^3)*((23 gm/s)/((999 kg/m^3)*π*0.25*(2.5 mm)^2))^2/2 = 0.10988 bar
l0 := 22 mm
lk := 6 mm
π*(D^2 - d^2)*30 bar/4 = 765.763 N
l3 := 10 mm
f(p) :=
    F ← π*(D^2 - d^2)*p*0.25
    l1 ← (F - lk*z)/z
    if l1 > l0 - lk - l3
        l1 ← l0 - lk - l3
    if l1 < 0 mm
        l1 ← 0 mm
    f ← F - z*(l1 + lk)
    l1
pp :=
    p0 ← 0 bar
    p1 ← 25 bar
    pt ← 1 bar
    for i ∈ 0, 1 .. p1/pt
        pp[i] ← p1 - i*pt
    pp
dm := 2.5 mm
n := 8
de := 4 mm
Fp := z*lk = 137.4 N
Dm := dm*sqrt(n) = 7.07107 mm
FE := Fp - π*de^2*30 bar/4 = 99.7009 N
i := 0, 1 .. last(pp)
35 bar*(22 mm)/(120 MPa) = 0.641667 mm
# [plot: f(pp[i]) (mm) vs pp[i] (bar)]
π/4*(4.5 mm)^2*30 bar + π/4*(20 mm)^2*12 bar - π/4*(6 mm)^2*12 bar = 390.775 N
