# Начальный данные:
# Давление наддува бака
p_1 := 22.3  # атм
# Объем бака:
V_б := 2.9  # л
# Объем заливаемой жидкости:
V_т := 1  # л
# Показатель процесса:
n := 1.3
# Расчет:
# Падение давления в подушке:
p_2 := p_1*((V_б - V_т)/V_б)^n = 12.8697  # атм
# Расчет массы газа в системе:
# Молярная масса газа(в нашем случае - азота):
μ := 28*10^-3  # кг/моль
# Объем, давление, температура:
p := 30  # атм
V := 1.9  # л
T := 20  # C
R_г := 8.314/μ = 296.929  # Дж/(кг*К)
M := (p*10^5*V*10^-3)*1000/(R_г*(T + 273)) = 65.5172  # г
