ΔP_э := 6.5*atm
β := 498*m/s
d_k := 3.5*mm
t := 5.3*s
ρ := 1.26*kg/L
n := 1.1
Q := 0.2*L/t = 3.77358e-5 m^3/s
F := π*d_k^2/4
M_t := Q*ρ/n = 0.0432247 kg/s
P_k := β*M_t/F = 22.081 atm
P_н := ΔP_э + P_k = 28.581 atm
