# Расчет бака на прочность
# коэф. безопасности на давление:
f_p := 1
# коэф. безопасности на продольную силу и изгибающий момент:
f_t := 1
# параметры материала оболочки:
# модуль упругости:
E := 7000  # МПа
# предел прочности:
σ_в := 196  # МПа
# предел текучести:
σ_т := 147  # МПа
# коэф. Пуассона:
# радиус оболочки:
R := 100*10^-3  # м
# толщина оболочки:
h := 2*10^-3  # м
# давление в баке:
p := 3  # МПа
# расчетная продольная сила:
T := 0  # кН
# расчетный изгибающий момент:
M := 0  # кН*м
# Решение
σ_1 := 1/h*(f_t*(T/(2*π*R) + M/(π*R^2)) + f_p*p*R/2)
σ_1 = 75  # МПа
σ_2 := 1/h*(f_p*p*R)
σ_2 = 150  # МПа
σ_экв := max(σ_1, σ_2)
σ_экв = 150  # МПа
η := σ_в/σ_экв
η = 1.30667
